// SBML level 3 version 1

model pdipy_oxidation()

  // Compartments:
  compartment default_compartment = 1;

  // Species:
  species ps in default_compartment = 91.47093;
  species e_ps in default_compartment = 0;
  species b_ps in default_compartment = 0;
  species mo in default_compartment = 2.812605e-7;
  species so in default_compartment = 0;
  species fa in default_compartment = 0.001005317;
  species o_fa in default_compartment = 0;

  // Parameters:
  o_eps = 0;

  // Assignment rules:
  oxidation := o_fa/(o_fa + fa);

  // Reactions:
  _J0: ps -> e_ps; 20000000000000*ps - 6.666667e8*e_ps;
  _J1: ps => b_ps; 0.0002702118*ps;
  _J2: e_ps + mo -> so + ps; 0.48*2000000*e_ps*mo - 97087.1*so;
  _J3: so + fa => o_fa + mo; 1383.991*so*fa;
end
